// COMSOL Multiphysics 6.3.0.290 model "Untitled5.mph"
// Outline of the model tree

Parameters
  z0 = 0[nm]  // 纳米锥与上介电层距离
  f0 = 70[kHz]
  p0 = 100[kPa]
  T0 = 1/f0
  t_ramp = 5*T0
  c0 = 1077[m/s]  // PDMS声速
  lamd0 = c0/f0

Functions
  an1: Analytic "解析 1" | expr = p0*sin(2*pi*f0*t)*(1-exp(-t/t_ramp)); args = t; fununit = N/m^2; argunit = s

Pairs
  p1: Contact "接触对 1" | source: boundaries 3; destination: boundaries 5

Geometry
  geom1 "几何 1" (2D, length unit µm)
    r1: Rectangle "矩形 1" | size = {2, 1}
    r2: Rectangle "矩形 2" | size = {2, 1}; pos = {0, -2}
    fin: Finalize "形成联合体" | pairtype = contact

Materials
  mat1: Common "PDMS - Polydimethylsiloxane" on all domains
    def: def "Basic"
      thermalexpansioncoefficient = 9e-4[1/K]
      heatcapacity = 1460[J/(kg*K)]
      relpermittivity = 2.75
      density = 970[kg/m^3]
      thermalconductivity = 0.16[W/(m*K)]
    Enu: Enu "Young's modulus and Poisson's ratio"
      E = 750[kPa]
      nu = 0.49

Physics
  solid: SolidMechanics "固体力学" on all domains
    dependent variable u = {u, v, w}
    lemm1: LinearElasticModel "线弹性材料 1" (default)
    free1: Free "自由 1" (default)
    init1: init "初始值 1" (default)
    dcnt1: SolidContact "接触 1" (default)
      adh1: Adhesion "黏附 1" on all boundaries | ActivationCriterion = Gap; delta0 = 0.5[um]
    hmm1: HyperelasticModel "超弹性材料 1" (disabled) on domains 1, 2
      vis1: Viscoelasticity "黏弹性 1" on all domains
        betavm = {1.06895, 0.34258, 0.24093, 0.17836}
        tauvm = {0.00023, 0.00198, 0.01323, 0.13860}
    fix1: Fixed "固定约束 1" on boundaries 6
    bndl1: BoundaryLoad "边界载荷 1" on boundaries 2 | forceReferenceArea = {0, an1(t), 0}
    cnt1: SolidContact "接触 1a" on all boundaries | penaltyCtrlPenalty = ManualTuning; fp_penalty = 0.5; pairs = p1

Mesh
  mesh1 "网格 1" (physics-controlled)
    size: MeshSizeDefault "大小" | hauto = 2

Studies
  std1 "研究 1"
    time: Transient "瞬态" | tlist = range(0,T0/50,2*T0)

Solver configurations
  sol1 "解 1" (study std1)
    v1: Variables "因变量 1"
    t1: Time "瞬态求解器 1"
      dDef: Direct "直接"
      fc1: FullyCoupled "全耦合 1"

Datasets
  dset1: Solution | solution = sol1

Plots
  pg1: PlotGroup2D "应力 (solid)" | data = dset1
    surf1: Surface "表面 1" | expr = solid.misesGp
      def: Deform "变形" | expr = {u, v}; descr = 位移场